a11 := 0
a21 := 0
a31 := 0
ax := 0
kx := 0
bx := 0
a12 := 0
a22 := 0
a32 := 0
ay := 0
ky := 0
by := 0
a13 := 0
a23 := 0
a33 := 0
az := 0
kz := 0
bz := 0
Given
[0; 0; 1; 1] == [a11, a12, a13, 0; a21, a22, a23, 0; a31, a32, a33, 0; ax, ay, az, 1]*[kx*(-0.02) + bx; ky*(-0.03) + by; kz*1.11 + bz; 1]
[0; 1; 0; 1] == [a11, a12, a13, 0; a21, a22, a23, 0; a31, a32, a33, 0; ax, ay, az, 1]*[kx*0.02 + bx; ky*1.01 + by; kz*0.11 + bz; 1]
[0; 0; -1; 1] == [a11, a12, a13, 0; a21, a22, a23, 0; a31, a32, a33, 0; ax, ay, az, 1]*[kx*0.06 + bx; ky*(-0.04) + by; kz*(-0.87) + bz; 1]
[0; -1; 0; 1] == [a11, a12, a13, 0; a21, a22, a23, 0; a31, a32, a33, 0; ax, ay, az, 1]*[kx*0.03 + bx; ky*(-1.07) + by; kz*0.09 + bz; 1]
[1; 0; 0; 1] == [a11, a12, a13, 0; a21, a22, a23, 0; a31, a32, a33, 0; ax, ay, az, 1]*[kx*1.07 + bx; ky*(-0.02) + by; kz*0.15 + bz; 1]
[-1; 0; 0; 1] == [a11, a12, a13, 0; a21, a22, a23, 0; a31, a32, a33, 0; ax, ay, az, 1]*[kx*(-1.01) + bx; ky*(-0.03) + by; kz*0.08 + bz; 1]
Find(a11, a12, a13, a21, a22, a23, a31, a32, a33, ax, ay, az, kx, ky, kz, bx, by, bz) =  # error: Эта переменная не определена.
Find(a11)
